*Heading
** Job name: water_sloshing_rotation Model name: Model-1
** Generated by: Abaqus/CAE 2024
*Preprint, echo=NO, model=NO, history=NO, contact=NO
**
** PARTS
**
*Part, name=eulerian
*Node
      1,         150.,          35.,          10.
      2,         150.,         32.5,          10.
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*Element, type=EC3D8R
    1,   246,   247,   296,   295,     1,     2,    51,    50
    2,   247,   248,   297,   296,     2,     3,    52,    51
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*Nset, nset=eulerian, generate
     1,  29645,      1
*Elset, elset=eulerian, generate
     1,  23040,      1
*Nset, nset=Set-4, generate
     1,  29645,      1
*Elset, elset=Set-4, generate
     1,  23040,      1
*Nset, nset=eulerian_water, generate
     1,  29645,      1
** Section: sec water
*Eulerian Section, elset=Set-4
water, fuel-1
*Surface, type=EULERIAN MATERIAL, name=fuel-1
fuel-1
*End Part
**
*Part, name=tank
*Node
      1,          50.,          30.,          10.
      2,          50.,         -30.,          10.
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*Element, type=R3D4
 1,   1,   9, 269,  60
 2,   9,  10, 270, 269
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*Node
   2435,         -50.,          30.,          10.
*Nset, nset=tank-RefPt_, internal
2435,
*Nset, nset=tank, generate
    1,  2434,     1
*Elset, elset=tank, generate
    1,  2432,     1
*Nset, nset=RP
 2435,
*Elset, elset=tank, generate
    1,  2432,     1
*End Part
**
**
** ASSEMBLY
**
*Assembly, name=Assembly
**
*Instance, name=eulerian-1, part=eulerian
         95.,          30.,           0.
*End Instance
**
*Instance, name=tank-1, part=tank
          0.,           5.,           0.
*End Instance
**
*Nset, nset=Set-4, instance=eulerian-1, generate
     1,  29645,      1
*Elset, elset=Set-4, instance=eulerian-1, generate
     1,  23040,      1
*Nset, nset=Set-6, instance=eulerian-1, generate
     1,  29645,      1
*Elset, elset=Set-6, instance=eulerian-1, generate
     1,  23040,      1
*Nset, nset=_PickedSet39, internal, instance=eulerian-1, generate
     1,  29645,      1
*Elset, elset=_PickedSet39, internal, instance=eulerian-1, generate
     1,  23040,      1
*Nset, nset=_PickedSet41, internal, instance=eulerian-1, generate
     1,  29645,      1
*Elset, elset=_PickedSet41, internal, instance=eulerian-1, generate
     1,  23040,      1
*Rigid Body, ref node=tank-1.tank-RefPt_, elset=tank-1.tank
*End Assembly
*Amplitude, name=angular
             0.,              0.,            0.01,              1.,            0.02,              1.
*Amplitude, name=velocity
             0.,              1.,            0.01,              0.,            0.02,              0.
**
** MATERIALS
**
*Material, name=water
*Density
 9.4e-10,
*Eos, type=USUP
 1.45e+06,0.,0.
*Viscosity
 1e-09,
**
** INTERACTION PROPERTIES
**
*Surface Interaction, name=contact
*Friction
 0.2,
*Surface Behavior, pressure-overclosure=HARD
**
** BOUNDARY CONDITIONS
**
** Name: displacement_and_rotation Type: Displacement/Rotation
*Boundary
tank-1.RP, 2, 2
tank-1.RP, 3, 3
tank-1.RP, 4, 4
tank-1.RP, 5, 5
**
** PREDEFINED FIELDS
**
** Name: Predefined Field-1   Type: Material assignment
*Initial Conditions, type=VOLUME FRACTION
eulerian-1.14997, eulerian-1.fuel-1, 1.
eulerian-1.14998, eulerian-1.fuel-1, 1.
eulerian-1.14999, eulerian-1.fuel-1, 1.
eulerian-1.15000, eulerian-1.fuel-1, 1.
eulerian-1.15001, eulerian-1.fuel-1, 1.
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eulerian-1.22644, eulerian-1.fuel-1, 1.
** Name: water_velocity   Type: Velocity
*Initial Conditions, type=ROTATING VELOCITY
eulerian-1.eulerian_water, 10., 5500., 0., 0.,
0., 0., 0., 0., 0., 1.,
** ----------------------------------------------------------------
**
** STEP: Step-1
**
*Step, name=Step-1, nlgeom=YES
*Dynamic, Explicit
, 0.02
*Bulk Viscosity
0.06, 1.2
**
** BOUNDARY CONDITIONS
**
** Name: angular_velocity Type: Velocity/Angular velocity
*Boundary, amplitude=angular, type=VELOCITY
tank-1.RP, 6, 6, 10.
** Name: velocity Type: Velocity/Angular velocity
*Boundary, amplitude=velocity, type=VELOCITY
tank-1.RP, 1, 1, 5500.
**
** LOADS
**
** Name: Gravity   Type: Gravity
*Dload
, GRAV, 9810., 0., -1., 0.
**
** INTERACTIONS
**
** Interaction: Int-1
*Contact, op=NEW
*Contact Inclusions, ALL EXTERIOR
*Contact Property Assignment
 ,  , contact
**
** OUTPUT REQUESTS
**
*Restart, write, number interval=1, time marks=NO
**
** FIELD OUTPUT: F-Output-1
**
*Output, field, time interval=0.001
*Node Output
U,
*Element Output, directions=YES
EVF,
**
** HISTORY OUTPUT: H-Output-1
**
*Output, history, frequency=0
*End Step
